*Heading
** Job name: Job-2D_5 Model name: Job-2D_5
** Generated by: Abaqus/CAE 6.14-1
*Preprint, echo=NO, model=NO, history=NO, contact=NO
**
** PARTS
**
*Part, name=PART-TUBE-1
*Node
      1,           0.,          -2.
      2,           0.,          -1.
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*Element, type=CPS4R
  1,   1,   9,  57,  24
  2,   9,  10,  58,  57
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*Nset, nset=_PICKEDSET6, internal, generate
   1,  120,    1
*Elset, elset=_PICKEDSET6, internal, generate
   1,  100,    1
** Section: Section-1-_PICKEDSET6
*Solid Section, elset=_PICKEDSET6, material=MATERIAL-1
1.,
*End Part
**
**
** ASSEMBLY
**
*Assembly, name=Assembly
**
*Instance, name=PART-TUBE-1, part=PART-TUBE-1
*End Instance
**
*Nset, nset=_PICKEDSET5, internal, instance=PART-TUBE-1
  1,  4,  6,  7, 21, 22
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*Elset, elset=_PICKEDSET5, internal, instance=PART-TUBE-1
  1,  6, 11, 16, 21, 30
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*Elset, elset=__PICKEDSURF4_S2, internal, instance=PART-TUBE-1
   5,  10,  15,  20,  25,  80,  85,  90,  95, 100
*Elset, elset=__PICKEDSURF4_S4, internal, instance=PART-TUBE-1, generate
 26,  71,   5
*Elset, elset=__PICKEDSURF4_S2_1, internal, instance=PART-TUBE-1
   5,  10,  15,  20,  25,  80,  85,  90,  95, 100
*Elset, elset=__PICKEDSURF4_S4_1, internal, instance=PART-TUBE-1, generate
 26,  71,   5
*Surface, type=ELEMENT, name=_PICKEDSURF4, internal
__PICKEDSURF4_S2_1, S2
__PICKEDSURF4_S4_1, S4
*End Assembly
**
** MATERIALS
**
*Material, name=MATERIAL-1
*Elastic
1., 0.3
** ----------------------------------------------------------------
**
** STEP: Step-1
**
*Step, name=Step-1, nlgeom=NO
*Static
1., 1., 1e-05, 1.
**
** BOUNDARY CONDITIONS
**
** Name: Disp-BC-1 Type: Displacement/Rotation
*Boundary
_PICKEDSET5, 1, 1
** Name: Disp-BC-2 Type: Displacement/Rotation
*Boundary
_PICKEDSET5, 2, 2
** Name: Disp-BC-3 Type: Displacement/Rotation
*Boundary
_PICKEDSET5, 6, 6
**
** LOADS
**
** Name: SURFFORCE-1   Type: Pressure
*Dsload
_PICKEDSURF4, P, 1.
**
** OUTPUT REQUESTS
**
*Restart, write, frequency=0
**
** FIELD OUTPUT: F-Output-1
**
*Output, field, variable=PRESELECT
**
** HISTORY OUTPUT: H-Output-1
**
*Output, history, variable=PRESELECT
*End Step
