*Heading
** Job name: Merge-1 Model name: Model-1
** Generated by: Abaqus/CAE 6.14-1
*Preprint, echo=NO, model=NO, history=NO, contact=NO
** ----------------------------------------------------------------
**
** PART INSTANCE: Part-Floor-1
**
*Node
      1,         200.,         -10.,           0.
      2,         200.,          10.,           0.
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*Element, type=S4R
 1,   1,  23, 236,  46
 2,  23,  24, 237, 236
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*Nset, nset=Part-Floor-1__PickedSet20, generate
   1,  505,    1
*Elset, elset=Part-Floor-1__PickedSet20, generate
   1,  400,    1
** Section: Section-Floor
*Shell Section, elset=Part-Floor-1__PickedSet20, material=Concrete
1., 5
** ----------------------------------------------------------------
**
** PART INSTANCE: Part-Pier-2
**
*System
          0.,        -10.,       83.75,          1.,        -10.,       83.75
          0.,        -10.,       84.75
*Node
    506,           0.,      -133.75,           0.
    507,           0.,      -133.75,          10.
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*Element, type=C3D8R
401,  607,  934, 1211,  778,  506,  518,  774,  523
402,  934,  647,  856, 1211,  518,  507,  519,  774
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*Nset, nset=Part-Pier-2__PickedSet4, generate
 506, 1366,    1
*Elset, elset=Part-Pier-2__PickedSet4, generate
 401,  880,    1
** Section: Section-Pier
*Solid Section, elset=Part-Pier-2__PickedSet4, material=Concrete
,
** ----------------------------------------------------------------
**
** PART INSTANCE: Part-Pier-1
**
*System
          0.,         20.,       83.75,          1.,         20.,       83.75
          0.,         20.,       84.75
*Node
   1367,           0.,      -133.75,           0.
   1368,           0.,      -133.75,          10.
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*Element, type=C3D8R
 881, 1468, 1795, 2072, 1639, 1367, 1379, 1635, 1384
 882, 1795, 1508, 1717, 2072, 1379, 1368, 1380, 1635
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*Nset, nset=Part-Pier-1__PickedSet4, generate
1367, 2227,    1
*Elset, elset=Part-Pier-1__PickedSet4, generate
 881, 1360,    1
** Section: Section-Pier
*Solid Section, elset=Part-Pier-1__PickedSet4, material=Concrete
,
** ----------------------------------------------------------------
**
** PART INSTANCE: Part-RiverBank-1
**
*System
       -300.,          0.,        -50.,       -299.,          0.,        -50.
*Node
   2228,           0.,          10.,          20.
   2229,           0.,         -10.,          20.
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*Element, type=C3D8R
1361, 2289, 2464, 2617, 2374, 2228, 2240, 2344, 2255
1362, 2464, 2465, 2618, 2617, 2240, 2241, 2345, 2344
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*Nset, nset=Part-RiverBank-1__PickedSet2, generate
2228, 2832,    1
*Elset, elset=Part-RiverBank-1__PickedSet2, generate
1361, 1760,    1
** Section: Section-RiverBank
*Solid Section, elset=Part-RiverBank-1__PickedSet2, material=Granite
,
** ----------------------------------------------------------------
**
** PART INSTANCE: Part-RiverBank-2
**
*System
        250.,          0.,        -50.,        251.,          0.,        -50.
*Node
   2833,           0.,          10.,          20.
   2834,           0.,         -10.,          20.
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*Element, type=C3D8R
1761, 2894, 3069, 3222, 2979, 2833, 2845, 2949, 2860
1762, 3069, 3070, 3223, 3222, 2845, 2846, 2950, 2949
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*Nset, nset=Part-RiverBank-2__PickedSet2, generate
2833, 3437,    1
*Elset, elset=Part-RiverBank-2__PickedSet2, generate
1761, 2160,    1
** Section: Section-RiverBank
*Solid Section, elset=Part-RiverBank-2__PickedSet2, material=Granite
,
** ----------------------------------------------------------------
**
** PART INSTANCE: Part-SupportBeam-1
**
*System
          0.,        -10.,        -30.,          1.,        -10.,        -30.
          0.,        -10.,        -29.
*Node
   3438,        -200.,           0.,           0.
   3439,        -250.,           0.,           0.
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*Element, type=B31
2161, 3438, 3458
2162, 3458, 3459
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*Nset, nset=Part-SupportBeam-1__PickedSet2, generate
3438, 3780,    1
*Elset, elset=Part-SupportBeam-1__PickedSet2, generate
2161, 2512,    1
** Section: Section-SupportBeam  Profile: Profile-SupportBeam
*Beam Section, elset=Part-SupportBeam-1__PickedSet2, material=Aluminum, temperature=GRADIENTS, section=BOX
2., 2., 0.1, 0.1, 0.1, 0.1
0.,1.,-6.12323e-17
** ----------------------------------------------------------------
**
** PART INSTANCE: Part-SupportBeam-2
**
*System
          0.,         10.,        -30.,          1.,         10.,        -30.
          0.,         10.,        -29.
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*Elset, elset=Part-SupportBeam-2__PickedSet2, generate
2513, 2864,    1
** Section: Section-SupportBeam  Profile: Profile-SupportBeam
*Beam Section, elset=Part-SupportBeam-2__PickedSet2, material=Aluminum, temperature=GRADIENTS, section=BOX
2., 2., 0.1, 0.1, 0.1, 0.1
0.,1.,-6.12323e-17
** ----------------------------------------------------------------
**
** PART INSTANCE: Part-Cable50-1
**
*System
          0.,        -10.,          0.,         -1.,        -10.,          0.
 -7.49879891330929e-33,        -10.,          1.
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*Elset, elset=Part-Cable50-1__PickedSet2
2865,
** Section: Section-Cable
*Solid Section, elset=Part-Cable50-1__PickedSet2, material=Steel
0.25,
** ----------------------------------------------------------------
**
** PART INSTANCE: Part-Cable100-1
**
*System
          0.,        -10.,          0.,         -1.,        -10.,          0.
 -7.49879891330929e-33,        -10.,          1.
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*Elset, elset=Part-Cable100-1__PickedSet2
2866,
** Section: Section-Cable
*Solid Section, elset=Part-Cable100-1__PickedSet2, material=Steel
0.25,
** ----------------------------------------------------------------
**
** PART INSTANCE: Part-Cable150-1
**
*System
          0.,        -10.,          0.,         -1.,        -10.,          0.
 -7.49879891330929e-33,        -10.,          1.
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*Elset, elset=Part-Cable150-1__PickedSet2
2867,
** Section: Section-Cable
*Solid Section, elset=Part-Cable150-1__PickedSet2, material=Steel
0.25,
** ----------------------------------------------------------------
**
** PART INSTANCE: Part-Cable200-1
**
*System
          0.,        -10.,          0.,         -1.,        -10.,          0.
 -7.49879891330929e-33,        -10.,          1.
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*Elset, elset=Part-Cable200-1__PickedSet2
2868,
** Section: Section-Cable
*Solid Section, elset=Part-Cable200-1__PickedSet2, material=Steel
0.25,
** ----------------------------------------------------------------
**
** PART INSTANCE: Part-Cable250-1
**
*System
          0.,        -10.,          0.,         -1.,        -10.,          0.
 -7.49879891330929e-33,        -10.,          1.
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*Elset, elset=Part-Cable250-1__PickedSet2
2869,
** Section: Section-Cable
*Solid Section, elset=Part-Cable250-1__PickedSet2, material=Steel
0.25,
** ----------------------------------------------------------------
**
** PART INSTANCE: Part-Cable50-2
**
*System
          0.,         10.,          0.,         -1.,         10.,          0.
 -7.49879891330929e-33,         10.,          1.
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*Elset, elset=Part-Cable50-2__PickedSet2
2870,
** Section: Section-Cable
*Solid Section, elset=Part-Cable50-2__PickedSet2, material=Steel
0.25,
** ----------------------------------------------------------------
**
** PART INSTANCE: Part-Cable100-2
**
*System
          0.,         10.,          0.,         -1.,         10.,          0.
 -7.49879891330929e-33,         10.,          1.
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*Elset, elset=Part-Cable100-2__PickedSet2
2871,
** Section: Section-Cable
*Solid Section, elset=Part-Cable100-2__PickedSet2, material=Steel
0.25,
** ----------------------------------------------------------------
**
** PART INSTANCE: Part-Cable150-2
**
*System
          0.,         10.,          0.,         -1.,         10.,          0.
 -7.49879891330929e-33,         10.,          1.
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*Elset, elset=Part-Cable150-2__PickedSet2
2872,
** Section: Section-Cable
*Solid Section, elset=Part-Cable150-2__PickedSet2, material=Steel
0.25,
** ----------------------------------------------------------------
**
** PART INSTANCE: Part-Cable200-2
**
*System
          0.,         10.,          0.,         -1.,         10.,          0.
 -7.49879891330929e-33,         10.,          1.
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*Elset, elset=Part-Cable200-2__PickedSet2
2873,
** Section: Section-Cable
*Solid Section, elset=Part-Cable200-2__PickedSet2, material=Steel
0.25,
** ----------------------------------------------------------------
**
** PART INSTANCE: Part-Cable250-2
**
*System
          0.,         10.,          0.,         -1.,         10.,          0.
 -7.49879891330929e-33,         10.,          1.
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*Elset, elset=Part-Cable250-2__PickedSet2
2874,
** Section: Section-Cable
*Solid Section, elset=Part-Cable250-2__PickedSet2, material=Steel
0.25,
** ----------------------------------------------------------------
**
** PART INSTANCE: Part-Cable50-3
**
*System
          0.,        -10.,          0.,          1.,        -10.,          0.
          0.,        -10.,          1.
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*Elset, elset=Part-Cable50-3__PickedSet2
2875,
** Section: Section-Cable
*Solid Section, elset=Part-Cable50-3__PickedSet2, material=Steel
0.25,
** ----------------------------------------------------------------
**
** PART INSTANCE: Part-Cable100-3
**
*System
          0.,        -10.,          0.,          1.,        -10.,          0.
          0.,        -10.,          1.
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*Elset, elset=Part-Cable100-3__PickedSet2
2876,
** Section: Section-Cable
*Solid Section, elset=Part-Cable100-3__PickedSet2, material=Steel
0.25,
** ----------------------------------------------------------------
**
** PART INSTANCE: Part-Cable150-3
**
*System
          0.,        -10.,          0.,          1.,        -10.,          0.
          0.,        -10.,          1.
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*Elset, elset=Part-Cable150-3__PickedSet2
2877,
** Section: Section-Cable
*Solid Section, elset=Part-Cable150-3__PickedSet2, material=Steel
0.25,
** ----------------------------------------------------------------
**
** PART INSTANCE: Part-Cable200-3
**
*System
          0.,        -10.,          0.,          1.,        -10.,          0.
          0.,        -10.,          1.
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*Elset, elset=Part-Cable200-3__PickedSet2
2878,
** Section: Section-Cable
*Solid Section, elset=Part-Cable200-3__PickedSet2, material=Steel
0.25,
** ----------------------------------------------------------------
**
** PART INSTANCE: Part-Cable250-3
**
*System
          0.,        -10.,          0.,          1.,        -10.,          0.
          0.,        -10.,          1.
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*Elset, elset=Part-Cable250-3__PickedSet2
2879,
** Section: Section-Cable
*Solid Section, elset=Part-Cable250-3__PickedSet2, material=Steel
0.25,
** ----------------------------------------------------------------
**
** PART INSTANCE: Part-Cable50-4
**
*System
          0.,         10.,          0.,          1.,         10.,          0.
          0.,         10.,          1.
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*Elset, elset=Part-Cable50-4__PickedSet2
2880,
** Section: Section-Cable
*Solid Section, elset=Part-Cable50-4__PickedSet2, material=Steel
0.25,
** ----------------------------------------------------------------
**
** PART INSTANCE: Part-Cable100-4
**
*System
          0.,         10.,          0.,          1.,         10.,          0.
          0.,         10.,          1.
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*Elset, elset=Part-Cable100-4__PickedSet2
2881,
** Section: Section-Cable
*Solid Section, elset=Part-Cable100-4__PickedSet2, material=Steel
0.25,
** ----------------------------------------------------------------
**
** PART INSTANCE: Part-Cable150-4
**
*System
          0.,         10.,          0.,          1.,         10.,          0.
          0.,         10.,          1.
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*Elset, elset=Part-Cable150-4__PickedSet2
2882,
** Section: Section-Cable
*Solid Section, elset=Part-Cable150-4__PickedSet2, material=Steel
0.25,
** ----------------------------------------------------------------
**
** PART INSTANCE: Part-Cable200-4
**
*System
          0.,         10.,          0.,          1.,         10.,          0.
          0.,         10.,          1.
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*Elset, elset=Part-Cable200-4__PickedSet2
2883,
** Section: Section-Cable
*Solid Section, elset=Part-Cable200-4__PickedSet2, material=Steel
0.25,
** ----------------------------------------------------------------
**
** PART INSTANCE: Part-Cable250-4
**
*System
          0.,         10.,          0.,          1.,         10.,          0.
          0.,         10.,          1.
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*Elset, elset=Part-Cable250-4__PickedSet2
2884,
** Section: Section-Cable
*Solid Section, elset=Part-Cable250-4__PickedSet2, material=Steel
0.25,
*System
*Nset, nset=Set-102
 506, 507, 508, 509, 514, 515
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*Nset, nset=Set-102
1367,1368,1369,1370,1375,1376
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*Nset, nset=Set-102
2841,2842,2843,2844,2916,2917
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*Nset, nset=Set-102
2236,2237,2238,2239,2311,2312
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*Nset, nset=m_Set-6
 2,
*Nset, nset=m_Set-8
 3,
*Nset, nset=m_Set-10
 5,
*Nset, nset=m_Set-12
 22,
*Nset, nset=m_Set-13
 7,
*Nset, nset=m_Set-14
 21,
*Nset, nset=m_Set-16
 1,
*Nset, nset=m_Set-18
 4,
*Nset, nset=m_Set-20
 6,
*Nset, nset=m_Set-22
 8,
*Nset, nset=m_Set-24
 19,
*Nset, nset=m_Set-26
 17,
*Nset, nset=m_Set-28
 15,
*Nset, nset=m_Set-30
 13,
*Nset, nset=m_Set-32
 11,
*Nset, nset=m_Set-34
 20,
*Nset, nset=m_Set-36
 18,
*Nset, nset=m_Set-38
 16,
*Nset, nset=m_Set-40
 14,
*Nset, nset=m_Set-42
 12,
*Nset, nset=m_Set-44
 22,
*Nset, nset=m_Set-46
 2,
*Nset, nset=m_Set-48
 3,
*Nset, nset=m_Set-50
 5,
*Nset, nset=m_Set-52
 7,
*Nset, nset=m_Set-54
 9,
*Nset, nset=m_Set-56
 11,
*Nset, nset=m_Set-58
 13,
*Nset, nset=m_Set-60
 15,
*Nset, nset=m_Set-62
 17,
*Nset, nset=m_Set-64
 1,
*Nset, nset=m_Set-66
 4,
*Nset, nset=m_Set-68
 6,
*Nset, nset=m_Set-70
 8,
*Nset, nset=m_Set-72
 10,
*Nset, nset=m_Set-74
 12,
*Nset, nset=m_Set-76
 14,
*Nset, nset=m_Set-78
 16,
*Nset, nset=m_Set-80
 18,
*Nset, nset=m_Set-82
2833,
*Nset, nset=m_Set-84
2834,
*Nset, nset=m_Set-86
2235,
*Nset, nset=m_Set-88
2232,
*Nset, nset=m_Set-90
2835,2836,2853,2854,2855
*Elset, elset=m_Set-90, generate
1781, 1784,   1
*Nset, nset=m_Set-92
2233,2234,2264,2265,2266
*Elset, elset=m_Set-92, generate
1597, 1600,    1
*Nset, nset=m_Set-94
513,
*Nset, nset=m_Set-96
513,
*Nset, nset=m_Set-98
1371,
*Nset, nset=m_Set-100
1371,
*Nset, nset=s_Set-6
4160,
*Nset, nset=s_Set-8
4158,
*Nset, nset=s_Set-10
4156,
*Nset, nset=s_Set-12
4162,
*Nset, nset=s_Set-13
4154,
*Nset, nset=s_Set-14
4152,
*Nset, nset=s_Set-16
4150,
*Nset, nset=s_Set-18
4148,
*Nset, nset=s_Set-20
4146,
*Nset, nset=s_Set-22
4144,
*Nset, nset=s_Set-24
4142,
*Nset, nset=s_Set-26
4140,
*Nset, nset=s_Set-28
4138,
*Nset, nset=s_Set-30
4136,
*Nset, nset=s_Set-32
4134,
*Nset, nset=s_Set-34
4132,
*Nset, nset=s_Set-36
4130,
*Nset, nset=s_Set-38
4128,
*Nset, nset=s_Set-40
4126,
*Nset, nset=s_Set-42
4124,
*Nset, nset=s_Set-44
3798,
*Nset, nset=s_Set-46
3798,
*Nset, nset=s_Set-48
3800,
*Nset, nset=s_Set-50
3794,
*Nset, nset=s_Set-52
3796,
*Nset, nset=s_Set-54
3790,
*Nset, nset=s_Set-56
3788,
*Nset, nset=s_Set-58
3786,
*Nset, nset=s_Set-60
3785,
*Nset, nset=s_Set-62
3783,
*Nset, nset=s_Set-64
3455,
*Nset, nset=s_Set-66
3457,
*Nset, nset=s_Set-68
3451,
*Nset, nset=s_Set-70
3453,
*Nset, nset=s_Set-72
3447,
*Nset, nset=s_Set-74
3445,
*Nset, nset=s_Set-76
3443,
*Nset, nset=s_Set-78
3442,
*Nset, nset=s_Set-80
3440,
*Nset, nset=s_Set-82
3799,
*Nset, nset=s_Set-84
3456,
*Nset, nset=s_Set-86
3782,
*Nset, nset=s_Set-88
3439,
*Nset, nset=s_Set-90
  21,  22, 224, 225, 226
*Elset, elset=s_Set-90, generate
 397,  400,    1
*Nset, nset=s_Set-92
  19,  20, 203, 204, 205
*Elset, elset=s_Set-92, generate
 357,  360,    1
*Nset, nset=s_Set-94
4145,
*Nset, nset=s_Set-94
4147,
*Nset, nset=s_Set-94
4149,
*Nset, nset=s_Set-94
4153,
*Nset, nset=s_Set-94
4151,
*Nset, nset=s_Set-96
4125,
*Nset, nset=s_Set-96
4127,
*Nset, nset=s_Set-96
4131,
*Nset, nset=s_Set-96
4129,
*Nset, nset=s_Set-96
4133,
*Nset, nset=s_Set-98
4155,
*Nset, nset=s_Set-98
4157,
*Nset, nset=s_Set-98
4161,
*Nset, nset=s_Set-98
4159,
*Nset, nset=s_Set-98
4163,
*Nset, nset=s_Set-100
4135,
*Nset, nset=s_Set-100
4137,
*Nset, nset=s_Set-100
4139,
*Nset, nset=s_Set-100
4143,
*Nset, nset=s_Set-100
4141,
*Surface, type=NODE, name=m_Set-6_CNS_
m_Set-6, 1.
*Surface, type=NODE, name=s_Set-6_CNS_
s_Set-6, 1.
*Surface, type=NODE, name=m_Set-8_CNS_
m_Set-8, 1.
*Surface, type=NODE, name=s_Set-8_CNS_
s_Set-8, 1.
*Surface, type=NODE, name=m_Set-10_CNS_
m_Set-10, 1.
*Surface, type=NODE, name=s_Set-10_CNS_
s_Set-10, 1.
*Surface, type=NODE, name=m_Set-12_CNS_
m_Set-12, 1.
*Surface, type=NODE, name=s_Set-12_CNS_
s_Set-12, 1.
*Surface, type=NODE, name=m_Set-13_CNS_
m_Set-13, 1.
*Surface, type=NODE, name=s_Set-13_CNS_
s_Set-13, 1.
*Surface, type=NODE, name=m_Set-14_CNS_
m_Set-14, 1.
*Surface, type=NODE, name=s_Set-14_CNS_
s_Set-14, 1.
*Surface, type=NODE, name=m_Set-16_CNS_
m_Set-16, 1.
*Surface, type=NODE, name=s_Set-16_CNS_
s_Set-16, 1.
*Surface, type=NODE, name=m_Set-18_CNS_
m_Set-18, 1.
*Surface, type=NODE, name=s_Set-18_CNS_
s_Set-18, 1.
*Surface, type=NODE, name=m_Set-20_CNS_
m_Set-20, 1.
*Surface, type=NODE, name=s_Set-20_CNS_
s_Set-20, 1.
*Surface, type=NODE, name=m_Set-22_CNS_
m_Set-22, 1.
*Surface, type=NODE, name=s_Set-22_CNS_
s_Set-22, 1.
*Surface, type=NODE, name=m_Set-24_CNS_
m_Set-24, 1.
*Surface, type=NODE, name=s_Set-24_CNS_
s_Set-24, 1.
*Surface, type=NODE, name=m_Set-26_CNS_
m_Set-26, 1.
*Surface, type=NODE, name=s_Set-26_CNS_
s_Set-26, 1.
*Surface, type=NODE, name=m_Set-28_CNS_
m_Set-28, 1.
*Surface, type=NODE, name=s_Set-28_CNS_
s_Set-28, 1.
*Surface, type=NODE, name=m_Set-30_CNS_
m_Set-30, 1.
*Surface, type=NODE, name=s_Set-30_CNS_
s_Set-30, 1.
*Surface, type=NODE, name=m_Set-32_CNS_
m_Set-32, 1.
*Surface, type=NODE, name=s_Set-32_CNS_
s_Set-32, 1.
*Surface, type=NODE, name=m_Set-34_CNS_
m_Set-34, 1.
*Surface, type=NODE, name=s_Set-34_CNS_
s_Set-34, 1.
*Surface, type=NODE, name=m_Set-36_CNS_
m_Set-36, 1.
*Surface, type=NODE, name=s_Set-36_CNS_
s_Set-36, 1.
*Surface, type=NODE, name=m_Set-38_CNS_
m_Set-38, 1.
*Surface, type=NODE, name=s_Set-38_CNS_
s_Set-38, 1.
*Surface, type=NODE, name=m_Set-40_CNS_
m_Set-40, 1.
*Surface, type=NODE, name=s_Set-40_CNS_
s_Set-40, 1.
*Surface, type=NODE, name=m_Set-42_CNS_
m_Set-42, 1.
*Surface, type=NODE, name=s_Set-42_CNS_
s_Set-42, 1.
*Surface, type=NODE, name=m_Set-46_CNS_
m_Set-46, 1.
*Surface, type=NODE, name=s_Set-46_CNS_
s_Set-46, 1.
*Surface, type=NODE, name=m_Set-48_CNS_
m_Set-48, 1.
*Surface, type=NODE, name=s_Set-48_CNS_
s_Set-48, 1.
*Surface, type=NODE, name=m_Set-50_CNS_
m_Set-50, 1.
*Surface, type=NODE, name=s_Set-50_CNS_
s_Set-50, 1.
*Surface, type=NODE, name=m_Set-52_CNS_
m_Set-52, 1.
*Surface, type=NODE, name=s_Set-52_CNS_
s_Set-52, 1.
*Surface, type=NODE, name=m_Set-54_CNS_
m_Set-54, 1.
*Surface, type=NODE, name=s_Set-54_CNS_
s_Set-54, 1.
*Surface, type=NODE, name=m_Set-56_CNS_
m_Set-56, 1.
*Surface, type=NODE, name=s_Set-56_CNS_
s_Set-56, 1.
*Surface, type=NODE, name=m_Set-58_CNS_
m_Set-58, 1.
*Surface, type=NODE, name=s_Set-58_CNS_
s_Set-58, 1.
*Surface, type=NODE, name=m_Set-60_CNS_
m_Set-60, 1.
*Surface, type=NODE, name=s_Set-60_CNS_
s_Set-60, 1.
*Surface, type=NODE, name=m_Set-62_CNS_
m_Set-62, 1.
*Surface, type=NODE, name=s_Set-62_CNS_
s_Set-62, 1.
*Surface, type=NODE, name=m_Set-64_CNS_
m_Set-64, 1.
*Surface, type=NODE, name=s_Set-64_CNS_
s_Set-64, 1.
*Surface, type=NODE, name=m_Set-66_CNS_
m_Set-66, 1.
*Surface, type=NODE, name=s_Set-66_CNS_
s_Set-66, 1.
*Surface, type=NODE, name=m_Set-68_CNS_
m_Set-68, 1.
*Surface, type=NODE, name=s_Set-68_CNS_
s_Set-68, 1.
*Surface, type=NODE, name=m_Set-70_CNS_
m_Set-70, 1.
*Surface, type=NODE, name=s_Set-70_CNS_
s_Set-70, 1.
*Surface, type=NODE, name=m_Set-72_CNS_
m_Set-72, 1.
*Surface, type=NODE, name=s_Set-72_CNS_
s_Set-72, 1.
*Surface, type=NODE, name=m_Set-74_CNS_
m_Set-74, 1.
*Surface, type=NODE, name=s_Set-74_CNS_
s_Set-74, 1.
*Surface, type=NODE, name=m_Set-76_CNS_
m_Set-76, 1.
*Surface, type=NODE, name=s_Set-76_CNS_
s_Set-76, 1.
*Surface, type=NODE, name=m_Set-78_CNS_
m_Set-78, 1.
*Surface, type=NODE, name=s_Set-78_CNS_
s_Set-78, 1.
*Surface, type=NODE, name=m_Set-80_CNS_
m_Set-80, 1.
*Surface, type=NODE, name=s_Set-80_CNS_
s_Set-80, 1.
*Surface, type=NODE, name=m_Set-82_CNS_
m_Set-82, 1.
*Surface, type=NODE, name=s_Set-82_CNS_
s_Set-82, 1.
*Surface, type=NODE, name=m_Set-84_CNS_
m_Set-84, 1.
*Surface, type=NODE, name=s_Set-84_CNS_
s_Set-84, 1.
*Surface, type=NODE, name=m_Set-86_CNS_
m_Set-86, 1.
*Surface, type=NODE, name=s_Set-86_CNS_
s_Set-86, 1.
*Surface, type=NODE, name=m_Set-88_CNS_
m_Set-88, 1.
*Surface, type=NODE, name=s_Set-88_CNS_
s_Set-88, 1.
*Surface, type=NODE, name=m_Set-90_CNS_
m_Set-90, 1.
*Surface, type=NODE, name=s_Set-90_CNS_
s_Set-90, 1.
*Surface, type=NODE, name=m_Set-92_CNS_
m_Set-92, 1.
*Surface, type=NODE, name=s_Set-92_CNS_
s_Set-92, 1.
*Surface, type=NODE, name=m_Set-94_CNS_
m_Set-94, 1.
*Surface, type=NODE, name=s_Set-94_CNS_
s_Set-94, 1.
*Surface, type=NODE, name=m_Set-96_CNS_
m_Set-96, 1.
*Surface, type=NODE, name=s_Set-96_CNS_
s_Set-96, 1.
*Surface, type=NODE, name=m_Set-98_CNS_
m_Set-98, 1.
*Surface, type=NODE, name=s_Set-98_CNS_
s_Set-98, 1.
*Surface, type=NODE, name=m_Set-100_CNS_
m_Set-100, 1.
*Surface, type=NODE, name=s_Set-100_CNS_
s_Set-100, 1.
** Constraint: Constraint-2
*Tie, name=Constraint-2, adjust=yes, no rotation
s_Set-6_CNS_, m_Set-6_CNS_
** Constraint: Constraint-3
*Tie, name=Constraint-3, adjust=yes, no rotation
s_Set-8_CNS_, m_Set-8_CNS_
** Constraint: Constraint-4
*Tie, name=Constraint-4, adjust=yes, no rotation
s_Set-10_CNS_, m_Set-10_CNS_
** Constraint: Constraint-5
*Tie, name=Constraint-5, adjust=yes, no rotation
s_Set-12_CNS_, m_Set-12_CNS_
** Constraint: Constraint-6
*Tie, name=Constraint-6, adjust=yes, no rotation
s_Set-13_CNS_, m_Set-13_CNS_
** Constraint: Constraint-7
*Tie, name=Constraint-7, adjust=yes
s_Set-14_CNS_, m_Set-14_CNS_
** Constraint: Constraint-8
*Tie, name=Constraint-8, adjust=yes
s_Set-16_CNS_, m_Set-16_CNS_
** Constraint: Constraint-9
*Tie, name=Constraint-9, adjust=no
s_Set-18_CNS_, m_Set-18_CNS_
** Constraint: Constraint-10
*Tie, name=Constraint-10, adjust=yes, no rotation
s_Set-20_CNS_, m_Set-20_CNS_
** Constraint: Constraint-11
*Tie, name=Constraint-11, adjust=yes, no rotation
s_Set-22_CNS_, m_Set-22_CNS_
** Constraint: Constraint-12
*Tie, name=Constraint-12, adjust=yes, no rotation
s_Set-24_CNS_, m_Set-24_CNS_
** Constraint: Constraint-13
*Tie, name=Constraint-13, adjust=yes, no rotation
s_Set-26_CNS_, m_Set-26_CNS_
** Constraint: Constraint-14
*Tie, name=Constraint-14, adjust=yes, no rotation
s_Set-28_CNS_, m_Set-28_CNS_
** Constraint: Constraint-15
*Tie, name=Constraint-15, adjust=yes, no rotation
s_Set-30_CNS_, m_Set-30_CNS_
** Constraint: Constraint-16
*Tie, name=Constraint-16, adjust=yes, no rotation
s_Set-32_CNS_, m_Set-32_CNS_
** Constraint: Constraint-17
*Tie, name=Constraint-17, adjust=yes, no rotation
s_Set-34_CNS_, m_Set-34_CNS_
** Constraint: Constraint-18
*Tie, name=Constraint-18, adjust=yes, no rotation
s_Set-36_CNS_, m_Set-36_CNS_
** Constraint: Constraint-19
*Tie, name=Constraint-19, adjust=yes, no rotation
s_Set-38_CNS_, m_Set-38_CNS_
** Constraint: Constraint-20
*Tie, name=Constraint-20, adjust=yes, no rotation
s_Set-40_CNS_, m_Set-40_CNS_
** Constraint: Constraint-21
*Tie, name=Constraint-21, adjust=yes, no rotation
s_Set-42_CNS_, m_Set-42_CNS_
** Constraint: Constraint-22
*Tie, name=Constraint-22, adjust=yes, no rotation
s_Set-46_CNS_, m_Set-46_CNS_
** Constraint: Constraint-23
*Tie, name=Constraint-23, adjust=yes, no rotation
s_Set-48_CNS_, m_Set-48_CNS_
** Constraint: Constraint-24
*Tie, name=Constraint-24, adjust=yes, no rotation
s_Set-50_CNS_, m_Set-50_CNS_
** Constraint: Constraint-25
*Tie, name=Constraint-25, adjust=yes, no rotation
s_Set-52_CNS_, m_Set-52_CNS_
** Constraint: Constraint-26
*Tie, name=Constraint-26, adjust=yes, no rotation
s_Set-54_CNS_, m_Set-54_CNS_
** Constraint: Constraint-27
*Tie, name=Constraint-27, adjust=yes, no rotation
s_Set-56_CNS_, m_Set-56_CNS_
** Constraint: Constraint-28
*Tie, name=Constraint-28, adjust=yes, no rotation
s_Set-58_CNS_, m_Set-58_CNS_
** Constraint: Constraint-29
*Tie, name=Constraint-29, adjust=yes, no rotation
s_Set-60_CNS_, m_Set-60_CNS_
** Constraint: Constraint-30
*Tie, name=Constraint-30, adjust=yes, no rotation
s_Set-62_CNS_, m_Set-62_CNS_
** Constraint: Constraint-31
*Tie, name=Constraint-31, adjust=yes, no rotation
s_Set-64_CNS_, m_Set-64_CNS_
** Constraint: Constraint-32
*Tie, name=Constraint-32, adjust=yes, no rotation
s_Set-66_CNS_, m_Set-66_CNS_
** Constraint: Constraint-33
*Tie, name=Constraint-33, adjust=yes, no rotation
s_Set-68_CNS_, m_Set-68_CNS_
** Constraint: Constraint-34
*Tie, name=Constraint-34, adjust=yes, no rotation
s_Set-70_CNS_, m_Set-70_CNS_
** Constraint: Constraint-35
*Tie, name=Constraint-35, adjust=yes, no rotation
s_Set-72_CNS_, m_Set-72_CNS_
** Constraint: Constraint-36
*Tie, name=Constraint-36, adjust=yes, no rotation
s_Set-74_CNS_, m_Set-74_CNS_
** Constraint: Constraint-37
*Tie, name=Constraint-37, adjust=yes, no rotation
s_Set-76_CNS_, m_Set-76_CNS_
** Constraint: Constraint-38
*Tie, name=Constraint-38, adjust=yes, no rotation
s_Set-78_CNS_, m_Set-78_CNS_
** Constraint: Constraint-39
*Tie, name=Constraint-39, adjust=yes, no rotation
s_Set-80_CNS_, m_Set-80_CNS_
** Constraint: Constraint-40
*Tie, name=Constraint-40, adjust=yes, no rotation
s_Set-82_CNS_, m_Set-82_CNS_
** Constraint: Constraint-41
*Tie, name=Constraint-41, adjust=yes, no rotation
s_Set-84_CNS_, m_Set-84_CNS_
** Constraint: Constraint-42
*Tie, name=Constraint-42, adjust=yes, no rotation
s_Set-86_CNS_, m_Set-86_CNS_
** Constraint: Constraint-43
*Tie, name=Constraint-43, adjust=yes, no rotation
s_Set-88_CNS_, m_Set-88_CNS_
** Constraint: Constraint-44
*Tie, name=Constraint-44, adjust=yes, no rotation
s_Set-90_CNS_, m_Set-90_CNS_
** Constraint: Constraint-45
*Tie, name=Constraint-45, adjust=yes, no rotation
s_Set-92_CNS_, m_Set-92_CNS_
** Constraint: Constraint-46
*Tie, name=Constraint-46, adjust=yes, no rotation
s_Set-94_CNS_, m_Set-94_CNS_
** Constraint: Constraint-47
*Tie, name=Constraint-47, adjust=yes, no rotation
s_Set-96_CNS_, m_Set-96_CNS_
** Constraint: Constraint-48
*Tie, name=Constraint-48, adjust=yes, no rotation
s_Set-98_CNS_, m_Set-98_CNS_
** Constraint: Constraint-49
*Tie, name=Constraint-49, adjust=yes, no rotation
s_Set-100_CNS_, m_Set-100_CNS_
**
** MATERIALS
**
** For the SupportBeam
*Material, name=Aluminum
*Density
2710.,
*Elastic
 7e+10, 0.346
** For the Pier and the Floor
*Material, name=Concrete
*Density
2320.,
*Elastic
 2.5e+10, 0.3
** For the RiverBank
*Material, name=Granite
*Density
2770.,
*Elastic
 6e+10, 0.27
** For the Cable
*Material, name=Steel
*Density
7860.,
*Elastic
 1.17e+11, 0.266
** ----------------------------------------------------------------
**
** STEP: Step-1
**
*Step, name=Step-1, nlgeom=NO
*Static
1., 1., 1e-05, 1.
**
** BOUNDARY CONDITIONS
**
** Name: BC-1 Type: Displacement/Rotation
*Boundary
Set-102, 1, 1
Set-102, 2, 2
Set-102, 3, 3
**
** LOADS
**
** Name: Load-1   Type: Gravity
*Dload
, GRAV, 10., 0., 0., -1.
**
** OUTPUT REQUESTS
**
*Restart, write, frequency=0
**
** FIELD OUTPUT: F-Output-1
**
*Output, field, variable=PRESELECT
**
** HISTORY OUTPUT: H-Output-1
**
*Output, history, variable=PRESELECT
*End Step
