*Heading
** Job name: Merge-2 Model name: Merge-1
** Generated by: Abaqus/CAE 6.14-1
*Preprint, echo=NO, model=NO, history=NO, contact=NO
**
** PARTS
**
*Part, name=PART-1
*Node
      1,         200.,         -10.,           0.
      2,         200.,          10.,           0.
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*Element, type=S4R
  1,   1,  23, 236,  46
  2,  23,  24, 237, 236
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*Element, type=B31
2161, 3438, 3458
2162, 3458, 3459
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*Element, type=T3D2
2865,   12,  513
2866,   14,  513
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*Element, type=C3D8R
 401,  607,  934, 1211,  778,  506,  518,  774,  523
 402,  934,  647,  856, 1211,  518,  507,  519,  774
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*Elset, elset=PART-CABLE50-1__PICKEDSET2
 2865,
*Elset, elset=PART-CABLE50-2__PICKEDSET2
 2870,
*Elset, elset=PART-CABLE50-3__PICKEDSET2
 2875,
*Elset, elset=PART-CABLE50-4__PICKEDSET2
 2880,
*Elset, elset=PART-CABLE100-1__PICKEDSET2
 2866,
*Elset, elset=PART-CABLE100-2__PICKEDSET2
 2871,
*Elset, elset=PART-CABLE100-3__PICKEDSET2
 2876,
*Elset, elset=PART-CABLE100-4__PICKEDSET2
 2881,
*Elset, elset=PART-CABLE150-1__PICKEDSET2
 2867,
*Elset, elset=PART-CABLE150-2__PICKEDSET2
 2872,
*Elset, elset=PART-CABLE150-3__PICKEDSET2
 2877,
*Elset, elset=PART-CABLE150-4__PICKEDSET2
 2882,
*Elset, elset=PART-CABLE200-1__PICKEDSET2
 2868,
*Elset, elset=PART-CABLE200-2__PICKEDSET2
 2873,
*Elset, elset=PART-CABLE200-3__PICKEDSET2
 2878,
*Elset, elset=PART-CABLE200-4__PICKEDSET2
 2883,
*Elset, elset=PART-CABLE250-1__PICKEDSET2
 2869,
*Elset, elset=PART-CABLE250-2__PICKEDSET2
 2874,
*Elset, elset=PART-CABLE250-3__PICKEDSET2
 2879,
*Elset, elset=PART-CABLE250-4__PICKEDSET2
 2884,
*Elset, elset=PART-FLOOR-1__PICKEDSET20, generate
   1,  400,    1
*Elset, elset=PART-PIER-1__PICKEDSET4, generate
  881,  1360,     1
*Elset, elset=PART-PIER-2__PICKEDSET4, generate
 401,  880,    1
*Elset, elset=PART-RIVERBANK-1__PICKEDSET2, generate
 1361,  1760,     1
*Elset, elset=PART-RIVERBANK-2__PICKEDSET2, generate
 1761,  2160,     1
*Elset, elset=PART-SUPPORTBEAM-1__PICKEDSET2, generate
 2161,  2512,     1
*Elset, elset=PART-SUPPORTBEAM-2__PICKEDSET2, generate
 2513,  2864,     1
** Section: Section-1-PART-FLOOR-1__PICKEDSET20
*Shell Section, elset=PART-FLOOR-1__PICKEDSET20, material=CONCRETE
1., 5
** Section: Section-2-PART-PIER-2__PICKEDSET4
*Solid Section, elset=PART-PIER-2__PICKEDSET4, material=CONCRETE
,
** Section: Section-3-PART-PIER-1__PICKEDSET4
*Solid Section, elset=PART-PIER-1__PICKEDSET4, material=CONCRETE
,
** Section: Section-4-PART-RIVERBANK-1__PICKEDSET2
*Solid Section, elset=PART-RIVERBANK-1__PICKEDSET2, material=GRANITE
,
** Section: Section-5-PART-RIVERBANK-2__PICKEDSET2
*Solid Section, elset=PART-RIVERBANK-2__PICKEDSET2, material=GRANITE
,
** Section: Section-6-PART-SUPPORTBEAM-1__PICKEDSET2  Profile: Profile-1
*Beam Section, elset=PART-SUPPORTBEAM-1__PICKEDSET2, material=ALUMINUM, temperature=GRADIENTS, section=BOX
2., 2., 0.1, 0.1, 0.1, 0.1
0.,1.,-6.12323e-17
** Section: Section-7-PART-SUPPORTBEAM-2__PICKEDSET2  Profile: Profile-2
*Beam Section, elset=PART-SUPPORTBEAM-2__PICKEDSET2, material=ALUMINUM, temperature=GRADIENTS, section=BOX
2., 2., 0.1, 0.1, 0.1, 0.1
0.,1.,-6.12323e-17
** Section: Section-8-PART-CABLE50-1__PICKEDSET2
*Solid Section, elset=PART-CABLE50-1__PICKEDSET2, material=STEEL
0.25,
** Section: Section-9-PART-CABLE100-1__PICKEDSET2
*Solid Section, elset=PART-CABLE100-1__PICKEDSET2, material=STEEL
0.25,
** Section: Section-10-PART-CABLE150-1__PICKEDSET2
*Solid Section, elset=PART-CABLE150-1__PICKEDSET2, material=STEEL
0.25,
** Section: Section-11-PART-CABLE200-1__PICKEDSET2
*Solid Section, elset=PART-CABLE200-1__PICKEDSET2, material=STEEL
0.25,
** Section: Section-12-PART-CABLE250-1__PICKEDSET2
*Solid Section, elset=PART-CABLE250-1__PICKEDSET2, material=STEEL
0.25,
** Section: Section-13-PART-CABLE50-2__PICKEDSET2
*Solid Section, elset=PART-CABLE50-2__PICKEDSET2, material=STEEL
0.25,
** Section: Section-14-PART-CABLE100-2__PICKEDSET2
*Solid Section, elset=PART-CABLE100-2__PICKEDSET2, material=STEEL
0.25,
** Section: Section-15-PART-CABLE150-2__PICKEDSET2
*Solid Section, elset=PART-CABLE150-2__PICKEDSET2, material=STEEL
0.25,
** Section: Section-16-PART-CABLE200-2__PICKEDSET2
*Solid Section, elset=PART-CABLE200-2__PICKEDSET2, material=STEEL
0.25,
** Section: Section-17-PART-CABLE250-2__PICKEDSET2
*Solid Section, elset=PART-CABLE250-2__PICKEDSET2, material=STEEL
0.25,
** Section: Section-18-PART-CABLE50-3__PICKEDSET2
*Solid Section, elset=PART-CABLE50-3__PICKEDSET2, material=STEEL
0.25,
** Section: Section-19-PART-CABLE100-3__PICKEDSET2
*Solid Section, elset=PART-CABLE100-3__PICKEDSET2, material=STEEL
0.25,
** Section: Section-20-PART-CABLE150-3__PICKEDSET2
*Solid Section, elset=PART-CABLE150-3__PICKEDSET2, material=STEEL
0.25,
** Section: Section-21-PART-CABLE200-3__PICKEDSET2
*Solid Section, elset=PART-CABLE200-3__PICKEDSET2, material=STEEL
0.25,
** Section: Section-22-PART-CABLE250-3__PICKEDSET2
*Solid Section, elset=PART-CABLE250-3__PICKEDSET2, material=STEEL
0.25,
** Section: Section-23-PART-CABLE50-4__PICKEDSET2
*Solid Section, elset=PART-CABLE50-4__PICKEDSET2, material=STEEL
0.25,
** Section: Section-24-PART-CABLE100-4__PICKEDSET2
*Solid Section, elset=PART-CABLE100-4__PICKEDSET2, material=STEEL
0.25,
** Section: Section-25-PART-CABLE150-4__PICKEDSET2
*Solid Section, elset=PART-CABLE150-4__PICKEDSET2, material=STEEL
0.25,
** Section: Section-26-PART-CABLE200-4__PICKEDSET2
*Solid Section, elset=PART-CABLE200-4__PICKEDSET2, material=STEEL
0.25,
** Section: Section-27-PART-CABLE250-4__PICKEDSET2
*Solid Section, elset=PART-CABLE250-4__PICKEDSET2, material=STEEL
0.25,
*End Part
**
**
** ASSEMBLY
**
*Assembly, name=Assembly
**
*Instance, name=PART-1-1, part=PART-1
*End Instance
**
*Nset, nset=M_SET-6, instance=PART-1-1
 2,
*Nset, nset=M_SET-8, instance=PART-1-1
 3,
*Nset, nset=M_SET-10, instance=PART-1-1
 5,
*Nset, nset=M_SET-12, instance=PART-1-1
 22,
*Nset, nset=M_SET-13, instance=PART-1-1
 7,
*Nset, nset=M_SET-14, instance=PART-1-1
 21,
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*Elset, elset=M_SET-90, instance=PART-1-1, generate
 1781,  1784,     1
*Elset, elset=M_SET-92, instance=PART-1-1, generate
 1597,  1600,     1
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*Nset, nset=SET-102, instance=PART-1-1
  506,  507,  508,  509,  514,  515
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*Elset, elset=SET-102, instance=PART-1-1
  401,  402,  403,  404,  405,  406
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*Elset, elset=SET-CABLESGROUP1, instance=PART-1-1, generate
 2865,  2869,     1
*Elset, elset=SET-CABLESGROUP2, instance=PART-1-1, generate
 2870,  2874,     1
*Elset, elset=SET-CABLESGROUP3, instance=PART-1-1, generate
 2875,  2879,     1
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*Nset, nset=M_SET-6_CNS__CNS_, internal, instance=PART-1-1
 2,
*Nset, nset=M_SET-8_CNS_, internal, instance=PART-1-1
 3,
*Nset, nset=M_SET-8_CNS__CNS_, internal, instance=PART-1-1
 3,
*Nset, nset=M_SET-10_CNS_, internal, instance=PART-1-1
 5,
*Nset, nset=M_SET-10_CNS__CNS_, internal, instance=PART-1-1
 5,
*Nset, nset=M_SET-12_CNS_, internal, instance=PART-1-1
 22,
*Nset, nset=M_SET-12_CNS__CNS_, internal, instance=PART-1-1
 22,
*Nset, nset=M_SET-13_CNS_, internal, instance=PART-1-1
 7,
*Nset, nset=M_SET-13_CNS__CNS_, internal, instance=PART-1-1
 7,
*Nset, nset=M_SET-14_CNS_, internal, instance=PART-1-1
 21,
*Nset, nset=M_SET-14_CNS__CNS_, internal, instance=PART-1-1
 21,
*Nset, nset=M_SET-16_CNS_, internal, instance=PART-1-1
 1,
*Nset, nset=M_SET-16_CNS__CNS_, internal, instance=PART-1-1
 1,
*Nset, nset=M_SET-18_CNS_, internal, instance=PART-1-1
 4,
*Nset, nset=M_SET-18_CNS__CNS_, internal, instance=PART-1-1
 4,
*Nset, nset=M_SET-20_CNS_, internal, instance=PART-1-1
 6,
*Nset, nset=M_SET-20_CNS__CNS_, internal, instance=PART-1-1
 6,
*Nset, nset=M_SET-22_CNS_, internal, instance=PART-1-1
 8,
*Nset, nset=M_SET-22_CNS__CNS_, internal, instance=PART-1-1
 8,
*Nset, nset=M_SET-24_CNS_, internal, instance=PART-1-1
 19,
*Nset, nset=M_SET-24_CNS__CNS_, internal, instance=PART-1-1
 19,
*Nset, nset=M_SET-26_CNS_, internal, instance=PART-1-1
 17,
*Nset, nset=M_SET-26_CNS__CNS_, internal, instance=PART-1-1
 17,
*Nset, nset=M_SET-28_CNS_, internal, instance=PART-1-1
 15,
*Nset, nset=M_SET-28_CNS__CNS_, internal, instance=PART-1-1
 15,
*Nset, nset=M_SET-30_CNS_, internal, instance=PART-1-1
 13,
*Nset, nset=M_SET-30_CNS__CNS_, internal, instance=PART-1-1
 13,
*Nset, nset=M_SET-32_CNS_, internal, instance=PART-1-1
 11,
*Nset, nset=M_SET-32_CNS__CNS_, internal, instance=PART-1-1
 11,
*Nset, nset=M_SET-34_CNS_, internal, instance=PART-1-1
 20,
*Nset, nset=M_SET-34_CNS__CNS_, internal, instance=PART-1-1
 20,
*Nset, nset=M_SET-36_CNS_, internal, instance=PART-1-1
 18,
*Nset, nset=M_SET-36_CNS__CNS_, internal, instance=PART-1-1
 18,
*Nset, nset=M_SET-38_CNS_, internal, instance=PART-1-1
 16,
*Nset, nset=M_SET-38_CNS__CNS_, internal, instance=PART-1-1
 16,
*Nset, nset=M_SET-40_CNS_, internal, instance=PART-1-1
 14,
*Nset, nset=M_SET-40_CNS__CNS_, internal, instance=PART-1-1
 14,
*Nset, nset=M_SET-42_CNS_, internal, instance=PART-1-1
 12,
*Nset, nset=M_SET-42_CNS__CNS_, internal, instance=PART-1-1
 12,
*Nset, nset=M_SET-46_CNS_, internal, instance=PART-1-1
 2,
*Nset, nset=M_SET-46_CNS__CNS_, internal, instance=PART-1-1
 2,
*Nset, nset=M_SET-48_CNS_, internal, instance=PART-1-1
 3,
*Nset, nset=M_SET-48_CNS__CNS_, internal, instance=PART-1-1
 3,
*Nset, nset=M_SET-50_CNS_, internal, instance=PART-1-1
 5,
*Nset, nset=M_SET-50_CNS__CNS_, internal, instance=PART-1-1
 5,
*Nset, nset=M_SET-52_CNS_, internal, instance=PART-1-1
 7,
*Nset, nset=M_SET-52_CNS__CNS_, internal, instance=PART-1-1
 7,
*Nset, nset=M_SET-54_CNS_, internal, instance=PART-1-1
 9,
*Nset, nset=M_SET-54_CNS__CNS_, internal, instance=PART-1-1
 9,
*Nset, nset=M_SET-56_CNS_, internal, instance=PART-1-1
 11,
*Nset, nset=M_SET-56_CNS__CNS_, internal, instance=PART-1-1
 11,
*Nset, nset=M_SET-58_CNS_, internal, instance=PART-1-1
 13,
*Nset, nset=M_SET-58_CNS__CNS_, internal, instance=PART-1-1
 13,
*Nset, nset=M_SET-60_CNS_, internal, instance=PART-1-1
 15,
*Nset, nset=M_SET-60_CNS__CNS_, internal, instance=PART-1-1
 15,
*Nset, nset=M_SET-62_CNS_, internal, instance=PART-1-1
 17,
*Nset, nset=M_SET-62_CNS__CNS_, internal, instance=PART-1-1
 17,
*Nset, nset=M_SET-64_CNS_, internal, instance=PART-1-1
 1,
*Nset, nset=M_SET-64_CNS__CNS_, internal, instance=PART-1-1
 1,
*Nset, nset=M_SET-66_CNS_, internal, instance=PART-1-1
 4,
*Nset, nset=M_SET-66_CNS__CNS_, internal, instance=PART-1-1
 4,
*Nset, nset=M_SET-68_CNS_, internal, instance=PART-1-1
 6,
*Nset, nset=M_SET-68_CNS__CNS_, internal, instance=PART-1-1
 6,
*Nset, nset=M_SET-70_CNS_, internal, instance=PART-1-1
 8,
*Nset, nset=M_SET-70_CNS__CNS_, internal, instance=PART-1-1
 8,
*Nset, nset=M_SET-72_CNS_, internal, instance=PART-1-1
 10,
*Nset, nset=M_SET-72_CNS__CNS_, internal, instance=PART-1-1
 10,
*Nset, nset=M_SET-74_CNS_, internal, instance=PART-1-1
 12,
*Nset, nset=M_SET-74_CNS__CNS_, internal, instance=PART-1-1
 12,
*Nset, nset=M_SET-76_CNS_, internal, instance=PART-1-1
 14,
*Nset, nset=M_SET-76_CNS__CNS_, internal, instance=PART-1-1
 14,
*Nset, nset=M_SET-78_CNS_, internal, instance=PART-1-1
 16,
*Nset, nset=M_SET-78_CNS__CNS_, internal, instance=PART-1-1
 16,
*Nset, nset=M_SET-80_CNS_, internal, instance=PART-1-1
 18,
*Nset, nset=M_SET-80_CNS__CNS_, internal, instance=PART-1-1
 18,
*Nset, nset=M_SET-82_CNS_, internal, instance=PART-1-1
 2833,
*Nset, nset=M_SET-82_CNS__CNS_, internal, instance=PART-1-1
 2833,
*Nset, nset=M_SET-84_CNS_, internal, instance=PART-1-1
 2834,
*Nset, nset=M_SET-84_CNS__CNS_, internal, instance=PART-1-1
 2834,
*Nset, nset=M_SET-86_CNS_, internal, instance=PART-1-1
 2235,
*Nset, nset=M_SET-86_CNS__CNS_, internal, instance=PART-1-1
 2235,
*Nset, nset=M_SET-88_CNS_, internal, instance=PART-1-1
 2232,
*Nset, nset=M_SET-88_CNS__CNS_, internal, instance=PART-1-1
 2232,
*Nset, nset=M_SET-94_CNS_, internal, instance=PART-1-1
 513,
*Nset, nset=M_SET-94_CNS__CNS_, internal, instance=PART-1-1
 513,
*Nset, nset=M_SET-96_CNS_, internal, instance=PART-1-1
 513,
*Nset, nset=M_SET-96_CNS__CNS_, internal, instance=PART-1-1
 513,
*Nset, nset=M_SET-98_CNS_, internal, instance=PART-1-1
 1371,
*Nset, nset=M_SET-98_CNS__CNS_, internal, instance=PART-1-1
 1371,
*Nset, nset=M_SET-100_CNS_, internal, instance=PART-1-1
 1371,
*Nset, nset=M_SET-100_CNS__CNS_, internal, instance=PART-1-1
 1371,
*Nset, nset=S_SET-90_CNS_, internal, instance=PART-1-1
  21,  22, 224, 225, 226
*Nset, nset=S_SET-90_CNS__CNS_, internal, instance=PART-1-1
  21,  22, 224, 225, 226
*Nset, nset=S_SET-92_CNS_, internal, instance=PART-1-1
  19,  20, 203, 204, 205
*Nset, nset=S_SET-92_CNS__CNS_, internal, instance=PART-1-1
  19,  20, 203, 204, 205
*Surface, type=NODE, name=M_SET-6_CNS__CNS__CNS_, internal
M_SET-6_CNS__CNS_, 1.
*Surface, type=NODE, name=S_SET-6_CNS__CNS__CNS_, internal
S_SET-6_CNS__CNS_, 1.
*Surface, type=NODE, name=M_SET-8_CNS__CNS__CNS_, internal
M_SET-8_CNS__CNS_, 1.
*Surface, type=NODE, name=S_SET-8_CNS__CNS__CNS_, internal
S_SET-8_CNS__CNS_, 1.
*Surface, type=NODE, name=M_SET-10_CNS__CNS__CNS_, internal
M_SET-10_CNS__CNS_, 1.
*Surface, type=NODE, name=S_SET-10_CNS__CNS__CNS_, internal
S_SET-10_CNS__CNS_, 1.
*Surface, type=NODE, name=M_SET-12_CNS__CNS__CNS_, internal
M_SET-12_CNS__CNS_, 1.
*Surface, type=NODE, name=S_SET-12_CNS__CNS__CNS_, internal
S_SET-12_CNS__CNS_, 1.
*Surface, type=NODE, name=M_SET-13_CNS__CNS__CNS_, internal
M_SET-13_CNS__CNS_, 1.
*Surface, type=NODE, name=S_SET-13_CNS__CNS__CNS_, internal
S_SET-13_CNS__CNS_, 1.
*Surface, type=NODE, name=M_SET-14_CNS__CNS__CNS_, internal
M_SET-14_CNS__CNS_, 1.
*Surface, type=NODE, name=S_SET-14_CNS__CNS__CNS_, internal
S_SET-14_CNS__CNS_, 1.
*Surface, type=NODE, name=M_SET-16_CNS__CNS__CNS_, internal
M_SET-16_CNS__CNS_, 1.
*Surface, type=NODE, name=S_SET-16_CNS__CNS__CNS_, internal
S_SET-16_CNS__CNS_, 1.
*Surface, type=NODE, name=M_SET-18_CNS__CNS__CNS_, internal
M_SET-18_CNS__CNS_, 1.
*Surface, type=NODE, name=S_SET-18_CNS__CNS__CNS_, internal
S_SET-18_CNS__CNS_, 1.
*Surface, type=NODE, name=M_SET-20_CNS__CNS__CNS_, internal
M_SET-20_CNS__CNS_, 1.
*Surface, type=NODE, name=S_SET-20_CNS__CNS__CNS_, internal
S_SET-20_CNS__CNS_, 1.
*Surface, type=NODE, name=M_SET-22_CNS__CNS__CNS_, internal
M_SET-22_CNS__CNS_, 1.
*Surface, type=NODE, name=S_SET-22_CNS__CNS__CNS_, internal
S_SET-22_CNS__CNS_, 1.
*Surface, type=NODE, name=M_SET-24_CNS__CNS__CNS_, internal
M_SET-24_CNS__CNS_, 1.
*Surface, type=NODE, name=S_SET-24_CNS__CNS__CNS_, internal
S_SET-24_CNS__CNS_, 1.
*Surface, type=NODE, name=M_SET-26_CNS__CNS__CNS_, internal
M_SET-26_CNS__CNS_, 1.
*Surface, type=NODE, name=S_SET-26_CNS__CNS__CNS_, internal
S_SET-26_CNS__CNS_, 1.
*Surface, type=NODE, name=M_SET-28_CNS__CNS__CNS_, internal
M_SET-28_CNS__CNS_, 1.
*Surface, type=NODE, name=S_SET-28_CNS__CNS__CNS_, internal
S_SET-28_CNS__CNS_, 1.
*Surface, type=NODE, name=M_SET-30_CNS__CNS__CNS_, internal
M_SET-30_CNS__CNS_, 1.
*Surface, type=NODE, name=S_SET-30_CNS__CNS__CNS_, internal
S_SET-30_CNS__CNS_, 1.
*Surface, type=NODE, name=M_SET-32_CNS__CNS__CNS_, internal
M_SET-32_CNS__CNS_, 1.
*Surface, type=NODE, name=S_SET-32_CNS__CNS__CNS_, internal
S_SET-32_CNS__CNS_, 1.
*Surface, type=NODE, name=M_SET-34_CNS__CNS__CNS_, internal
M_SET-34_CNS__CNS_, 1.
*Surface, type=NODE, name=S_SET-34_CNS__CNS__CNS_, internal
S_SET-34_CNS__CNS_, 1.
*Surface, type=NODE, name=M_SET-36_CNS__CNS__CNS_, internal
M_SET-36_CNS__CNS_, 1.
*Surface, type=NODE, name=S_SET-36_CNS__CNS__CNS_, internal
S_SET-36_CNS__CNS_, 1.
*Surface, type=NODE, name=M_SET-38_CNS__CNS__CNS_, internal
M_SET-38_CNS__CNS_, 1.
*Surface, type=NODE, name=S_SET-38_CNS__CNS__CNS_, internal
S_SET-38_CNS__CNS_, 1.
*Surface, type=NODE, name=M_SET-40_CNS__CNS__CNS_, internal
M_SET-40_CNS__CNS_, 1.
*Surface, type=NODE, name=S_SET-40_CNS__CNS__CNS_, internal
S_SET-40_CNS__CNS_, 1.
*Surface, type=NODE, name=M_SET-42_CNS__CNS__CNS_, internal
M_SET-42_CNS__CNS_, 1.
*Surface, type=NODE, name=S_SET-42_CNS__CNS__CNS_, internal
S_SET-42_CNS__CNS_, 1.
*Surface, type=NODE, name=M_SET-46_CNS__CNS__CNS_, internal
M_SET-46_CNS__CNS_, 1.
*Surface, type=NODE, name=S_SET-46_CNS__CNS__CNS_, internal
S_SET-46_CNS__CNS_, 1.
*Surface, type=NODE, name=M_SET-48_CNS__CNS__CNS_, internal
M_SET-48_CNS__CNS_, 1.
*Surface, type=NODE, name=S_SET-48_CNS__CNS__CNS_, internal
S_SET-48_CNS__CNS_, 1.
*Surface, type=NODE, name=M_SET-50_CNS__CNS__CNS_, internal
M_SET-50_CNS__CNS_, 1.
*Surface, type=NODE, name=S_SET-50_CNS__CNS__CNS_, internal
S_SET-50_CNS__CNS_, 1.
*Surface, type=NODE, name=M_SET-52_CNS__CNS__CNS_, internal
M_SET-52_CNS__CNS_, 1.
*Surface, type=NODE, name=S_SET-52_CNS__CNS__CNS_, internal
S_SET-52_CNS__CNS_, 1.
*Surface, type=NODE, name=M_SET-54_CNS__CNS__CNS_, internal
M_SET-54_CNS__CNS_, 1.
*Surface, type=NODE, name=S_SET-54_CNS__CNS__CNS_, internal
S_SET-54_CNS__CNS_, 1.
*Surface, type=NODE, name=M_SET-56_CNS__CNS__CNS_, internal
M_SET-56_CNS__CNS_, 1.
*Surface, type=NODE, name=S_SET-56_CNS__CNS__CNS_, internal
S_SET-56_CNS__CNS_, 1.
*Surface, type=NODE, name=M_SET-58_CNS__CNS__CNS_, internal
M_SET-58_CNS__CNS_, 1.
*Surface, type=NODE, name=S_SET-58_CNS__CNS__CNS_, internal
S_SET-58_CNS__CNS_, 1.
*Surface, type=NODE, name=M_SET-60_CNS__CNS__CNS_, internal
M_SET-60_CNS__CNS_, 1.
*Surface, type=NODE, name=S_SET-60_CNS__CNS__CNS_, internal
S_SET-60_CNS__CNS_, 1.
*Surface, type=NODE, name=M_SET-62_CNS__CNS__CNS_, internal
M_SET-62_CNS__CNS_, 1.
*Surface, type=NODE, name=S_SET-62_CNS__CNS__CNS_, internal
S_SET-62_CNS__CNS_, 1.
*Surface, type=NODE, name=M_SET-64_CNS__CNS__CNS_, internal
M_SET-64_CNS__CNS_, 1.
*Surface, type=NODE, name=S_SET-64_CNS__CNS__CNS_, internal
S_SET-64_CNS__CNS_, 1.
*Surface, type=NODE, name=M_SET-66_CNS__CNS__CNS_, internal
M_SET-66_CNS__CNS_, 1.
*Surface, type=NODE, name=S_SET-66_CNS__CNS__CNS_, internal
S_SET-66_CNS__CNS_, 1.
*Surface, type=NODE, name=M_SET-68_CNS__CNS__CNS_, internal
M_SET-68_CNS__CNS_, 1.
*Surface, type=NODE, name=S_SET-68_CNS__CNS__CNS_, internal
S_SET-68_CNS__CNS_, 1.
*Surface, type=NODE, name=M_SET-70_CNS__CNS__CNS_, internal
M_SET-70_CNS__CNS_, 1.
*Surface, type=NODE, name=S_SET-70_CNS__CNS__CNS_, internal
S_SET-70_CNS__CNS_, 1.
*Surface, type=NODE, name=M_SET-72_CNS__CNS__CNS_, internal
M_SET-72_CNS__CNS_, 1.
*Surface, type=NODE, name=S_SET-72_CNS__CNS__CNS_, internal
S_SET-72_CNS__CNS_, 1.
*Surface, type=NODE, name=M_SET-74_CNS__CNS__CNS_, internal
M_SET-74_CNS__CNS_, 1.
*Surface, type=NODE, name=S_SET-74_CNS__CNS__CNS_, internal
S_SET-74_CNS__CNS_, 1.
*Surface, type=NODE, name=M_SET-76_CNS__CNS__CNS_, internal
M_SET-76_CNS__CNS_, 1.
*Surface, type=NODE, name=S_SET-76_CNS__CNS__CNS_, internal
S_SET-76_CNS__CNS_, 1.
*Surface, type=NODE, name=M_SET-78_CNS__CNS__CNS_, internal
M_SET-78_CNS__CNS_, 1.
*Surface, type=NODE, name=S_SET-78_CNS__CNS__CNS_, internal
S_SET-78_CNS__CNS_, 1.
*Surface, type=NODE, name=M_SET-80_CNS__CNS__CNS_, internal
M_SET-80_CNS__CNS_, 1.
*Surface, type=NODE, name=S_SET-80_CNS__CNS__CNS_, internal
S_SET-80_CNS__CNS_, 1.
*Surface, type=NODE, name=M_SET-82_CNS__CNS__CNS_, internal
M_SET-82_CNS__CNS_, 1.
*Surface, type=NODE, name=S_SET-82_CNS__CNS__CNS_, internal
S_SET-82_CNS__CNS_, 1.
*Surface, type=NODE, name=M_SET-84_CNS__CNS__CNS_, internal
M_SET-84_CNS__CNS_, 1.
*Surface, type=NODE, name=S_SET-84_CNS__CNS__CNS_, internal
S_SET-84_CNS__CNS_, 1.
*Surface, type=NODE, name=M_SET-86_CNS__CNS__CNS_, internal
M_SET-86_CNS__CNS_, 1.
*Surface, type=NODE, name=S_SET-86_CNS__CNS__CNS_, internal
S_SET-86_CNS__CNS_, 1.
*Surface, type=NODE, name=M_SET-88_CNS__CNS__CNS_, internal
M_SET-88_CNS__CNS_, 1.
*Surface, type=NODE, name=S_SET-88_CNS__CNS__CNS_, internal
S_SET-88_CNS__CNS_, 1.
*Surface, type=NODE, name=M_SET-90_CNS__CNS__CNS_, internal
M_SET-90_CNS__CNS_, 1.
*Surface, type=NODE, name=S_SET-90_CNS__CNS__CNS_, internal
S_SET-90_CNS__CNS_, 1.
*Surface, type=NODE, name=M_SET-92_CNS__CNS__CNS_, internal
M_SET-92_CNS__CNS_, 1.
*Surface, type=NODE, name=S_SET-92_CNS__CNS__CNS_, internal
S_SET-92_CNS__CNS_, 1.
*Surface, type=NODE, name=M_SET-94_CNS__CNS__CNS_, internal
M_SET-94_CNS__CNS_, 1.
*Surface, type=NODE, name=S_SET-94_CNS__CNS__CNS_, internal
S_SET-94_CNS__CNS_, 1.
*Surface, type=NODE, name=M_SET-96_CNS__CNS__CNS_, internal
M_SET-96_CNS__CNS_, 1.
*Surface, type=NODE, name=S_SET-96_CNS__CNS__CNS_, internal
S_SET-96_CNS__CNS_, 1.
*Surface, type=NODE, name=M_SET-98_CNS__CNS__CNS_, internal
M_SET-98_CNS__CNS_, 1.
*Surface, type=NODE, name=S_SET-98_CNS__CNS__CNS_, internal
S_SET-98_CNS__CNS_, 1.
*Surface, type=NODE, name=M_SET-100_CNS__CNS__CNS_, internal
M_SET-100_CNS__CNS_, 1.
*Surface, type=NODE, name=S_SET-100_CNS__CNS__CNS_, internal
S_SET-100_CNS__CNS_, 1.
** Constraint: CONSTRAINT-2-1-1
*Tie, name=CONSTRAINT-2-1-1, adjust=yes, no rotation
S_SET-6_CNS__CNS__CNS_, M_SET-6_CNS__CNS__CNS_
** Constraint: CONSTRAINT-3-1-1
*Tie, name=CONSTRAINT-3-1-1, adjust=yes, no rotation
S_SET-8_CNS__CNS__CNS_, M_SET-8_CNS__CNS__CNS_
** Constraint: CONSTRAINT-4-1-1
*Tie, name=CONSTRAINT-4-1-1, adjust=yes, no rotation
S_SET-10_CNS__CNS__CNS_, M_SET-10_CNS__CNS__CNS_
** Constraint: CONSTRAINT-5-1-1
*Tie, name=CONSTRAINT-5-1-1, adjust=yes, no rotation
S_SET-12_CNS__CNS__CNS_, M_SET-12_CNS__CNS__CNS_
** Constraint: CONSTRAINT-6-1-1
*Tie, name=CONSTRAINT-6-1-1, adjust=yes, no rotation
S_SET-13_CNS__CNS__CNS_, M_SET-13_CNS__CNS__CNS_
** Constraint: CONSTRAINT-7-1-1
*Tie, name=CONSTRAINT-7-1-1, adjust=yes
S_SET-14_CNS__CNS__CNS_, M_SET-14_CNS__CNS__CNS_
** Constraint: CONSTRAINT-8-1-1
*Tie, name=CONSTRAINT-8-1-1, adjust=yes
S_SET-16_CNS__CNS__CNS_, M_SET-16_CNS__CNS__CNS_
** Constraint: CONSTRAINT-9-1-1
*Tie, name=CONSTRAINT-9-1-1, adjust=no
S_SET-18_CNS__CNS__CNS_, M_SET-18_CNS__CNS__CNS_
** Constraint: CONSTRAINT-10-1-1
*Tie, name=CONSTRAINT-10-1-1, adjust=yes, no rotation
S_SET-20_CNS__CNS__CNS_, M_SET-20_CNS__CNS__CNS_
** Constraint: CONSTRAINT-11-1-1
*Tie, name=CONSTRAINT-11-1-1, adjust=yes, no rotation
S_SET-22_CNS__CNS__CNS_, M_SET-22_CNS__CNS__CNS_
** Constraint: CONSTRAINT-12-1-1
*Tie, name=CONSTRAINT-12-1-1, adjust=yes, no rotation
S_SET-24_CNS__CNS__CNS_, M_SET-24_CNS__CNS__CNS_
** Constraint: CONSTRAINT-13-1-1
*Tie, name=CONSTRAINT-13-1-1, adjust=yes, no rotation
S_SET-26_CNS__CNS__CNS_, M_SET-26_CNS__CNS__CNS_
** Constraint: CONSTRAINT-14-1-1
*Tie, name=CONSTRAINT-14-1-1, adjust=yes, no rotation
S_SET-28_CNS__CNS__CNS_, M_SET-28_CNS__CNS__CNS_
** Constraint: CONSTRAINT-15-1-1
*Tie, name=CONSTRAINT-15-1-1, adjust=yes, no rotation
S_SET-30_CNS__CNS__CNS_, M_SET-30_CNS__CNS__CNS_
** Constraint: CONSTRAINT-16-1-1
*Tie, name=CONSTRAINT-16-1-1, adjust=yes, no rotation
S_SET-32_CNS__CNS__CNS_, M_SET-32_CNS__CNS__CNS_
** Constraint: CONSTRAINT-17-1-1
*Tie, name=CONSTRAINT-17-1-1, adjust=yes, no rotation
S_SET-34_CNS__CNS__CNS_, M_SET-34_CNS__CNS__CNS_
** Constraint: CONSTRAINT-18-1-1
*Tie, name=CONSTRAINT-18-1-1, adjust=yes, no rotation
S_SET-36_CNS__CNS__CNS_, M_SET-36_CNS__CNS__CNS_
** Constraint: CONSTRAINT-19-1-1
*Tie, name=CONSTRAINT-19-1-1, adjust=yes, no rotation
S_SET-38_CNS__CNS__CNS_, M_SET-38_CNS__CNS__CNS_
** Constraint: CONSTRAINT-20-1-1
*Tie, name=CONSTRAINT-20-1-1, adjust=yes, no rotation
S_SET-40_CNS__CNS__CNS_, M_SET-40_CNS__CNS__CNS_
** Constraint: CONSTRAINT-21-1-1
*Tie, name=CONSTRAINT-21-1-1, adjust=yes, no rotation
S_SET-42_CNS__CNS__CNS_, M_SET-42_CNS__CNS__CNS_
** Constraint: CONSTRAINT-22-1-1
*Tie, name=CONSTRAINT-22-1-1, adjust=yes, no rotation
S_SET-46_CNS__CNS__CNS_, M_SET-46_CNS__CNS__CNS_
** Constraint: CONSTRAINT-23-1-1
*Tie, name=CONSTRAINT-23-1-1, adjust=yes, no rotation
S_SET-48_CNS__CNS__CNS_, M_SET-48_CNS__CNS__CNS_
** Constraint: CONSTRAINT-24-1-1
*Tie, name=CONSTRAINT-24-1-1, adjust=yes, no rotation
S_SET-50_CNS__CNS__CNS_, M_SET-50_CNS__CNS__CNS_
** Constraint: CONSTRAINT-25-1-1
*Tie, name=CONSTRAINT-25-1-1, adjust=yes, no rotation
S_SET-52_CNS__CNS__CNS_, M_SET-52_CNS__CNS__CNS_
** Constraint: CONSTRAINT-26-1-1
*Tie, name=CONSTRAINT-26-1-1, adjust=yes, no rotation
S_SET-54_CNS__CNS__CNS_, M_SET-54_CNS__CNS__CNS_
** Constraint: CONSTRAINT-27-1-1
*Tie, name=CONSTRAINT-27-1-1, adjust=yes, no rotation
S_SET-56_CNS__CNS__CNS_, M_SET-56_CNS__CNS__CNS_
** Constraint: CONSTRAINT-28-1-1
*Tie, name=CONSTRAINT-28-1-1, adjust=yes, no rotation
S_SET-58_CNS__CNS__CNS_, M_SET-58_CNS__CNS__CNS_
** Constraint: CONSTRAINT-29-1-1
*Tie, name=CONSTRAINT-29-1-1, adjust=yes, no rotation
S_SET-60_CNS__CNS__CNS_, M_SET-60_CNS__CNS__CNS_
** Constraint: CONSTRAINT-30-1-1
*Tie, name=CONSTRAINT-30-1-1, adjust=yes, no rotation
S_SET-62_CNS__CNS__CNS_, M_SET-62_CNS__CNS__CNS_
** Constraint: CONSTRAINT-31-1-1
*Tie, name=CONSTRAINT-31-1-1, adjust=yes, no rotation
S_SET-64_CNS__CNS__CNS_, M_SET-64_CNS__CNS__CNS_
** Constraint: CONSTRAINT-32-1-1
*Tie, name=CONSTRAINT-32-1-1, adjust=yes, no rotation
S_SET-66_CNS__CNS__CNS_, M_SET-66_CNS__CNS__CNS_
** Constraint: CONSTRAINT-33-1-1
*Tie, name=CONSTRAINT-33-1-1, adjust=yes, no rotation
S_SET-68_CNS__CNS__CNS_, M_SET-68_CNS__CNS__CNS_
** Constraint: CONSTRAINT-34-1-1
*Tie, name=CONSTRAINT-34-1-1, adjust=yes, no rotation
S_SET-70_CNS__CNS__CNS_, M_SET-70_CNS__CNS__CNS_
** Constraint: CONSTRAINT-35-1-1
*Tie, name=CONSTRAINT-35-1-1, adjust=yes, no rotation
S_SET-72_CNS__CNS__CNS_, M_SET-72_CNS__CNS__CNS_
** Constraint: CONSTRAINT-36-1-1
*Tie, name=CONSTRAINT-36-1-1, adjust=yes, no rotation
S_SET-74_CNS__CNS__CNS_, M_SET-74_CNS__CNS__CNS_
** Constraint: CONSTRAINT-37-1-1
*Tie, name=CONSTRAINT-37-1-1, adjust=yes, no rotation
S_SET-76_CNS__CNS__CNS_, M_SET-76_CNS__CNS__CNS_
** Constraint: CONSTRAINT-38-1-1
*Tie, name=CONSTRAINT-38-1-1, adjust=yes, no rotation
S_SET-78_CNS__CNS__CNS_, M_SET-78_CNS__CNS__CNS_
** Constraint: CONSTRAINT-39-1-1
*Tie, name=CONSTRAINT-39-1-1, adjust=yes, no rotation
S_SET-80_CNS__CNS__CNS_, M_SET-80_CNS__CNS__CNS_
** Constraint: CONSTRAINT-40-1-1
*Tie, name=CONSTRAINT-40-1-1, adjust=yes, no rotation
S_SET-82_CNS__CNS__CNS_, M_SET-82_CNS__CNS__CNS_
** Constraint: CONSTRAINT-41-1-1
*Tie, name=CONSTRAINT-41-1-1, adjust=yes, no rotation
S_SET-84_CNS__CNS__CNS_, M_SET-84_CNS__CNS__CNS_
** Constraint: CONSTRAINT-42-1-1
*Tie, name=CONSTRAINT-42-1-1, adjust=yes, no rotation
S_SET-86_CNS__CNS__CNS_, M_SET-86_CNS__CNS__CNS_
** Constraint: CONSTRAINT-43-1-1
*Tie, name=CONSTRAINT-43-1-1, adjust=yes, no rotation
S_SET-88_CNS__CNS__CNS_, M_SET-88_CNS__CNS__CNS_
** Constraint: CONSTRAINT-44-1-1
*Tie, name=CONSTRAINT-44-1-1, adjust=yes, no rotation
S_SET-90_CNS__CNS__CNS_, M_SET-90_CNS__CNS__CNS_
** Constraint: CONSTRAINT-45-1-1
*Tie, name=CONSTRAINT-45-1-1, adjust=yes, no rotation
S_SET-92_CNS__CNS__CNS_, M_SET-92_CNS__CNS__CNS_
** Constraint: CONSTRAINT-46-1-1
*Tie, name=CONSTRAINT-46-1-1, adjust=yes, no rotation
S_SET-94_CNS__CNS__CNS_, M_SET-94_CNS__CNS__CNS_
** Constraint: CONSTRAINT-47-1-1
*Tie, name=CONSTRAINT-47-1-1, adjust=yes, no rotation
S_SET-96_CNS__CNS__CNS_, M_SET-96_CNS__CNS__CNS_
** Constraint: CONSTRAINT-48-1-1
*Tie, name=CONSTRAINT-48-1-1, adjust=yes, no rotation
S_SET-98_CNS__CNS__CNS_, M_SET-98_CNS__CNS__CNS_
** Constraint: CONSTRAINT-49-1-1
*Tie, name=CONSTRAINT-49-1-1, adjust=yes, no rotation
S_SET-100_CNS__CNS__CNS_, M_SET-100_CNS__CNS__CNS_
*End Assembly
**
** MATERIALS
**
**   For the SupportBeam
*Material, name=ALUMINUM
*Density
2710.,
*Elastic
 7e+10, 0.346
**   For the Pier and the Floor
*Material, name=CONCRETE
*Density
2320.,
*Elastic
 2.5e+10, 0.3
**   For the RiverBank
*Material, name=GRANITE
*Density
2770.,
*Elastic
 6e+10, 0.27
**   For the Cable
*Material, name=STEEL
*Density
7860.,
*Elastic
 1.17e+11, 0.266
** ----------------------------------------------------------------
**
** STEP: Step-1
**
*Step, name=Step-1, nlgeom=NO
*Static
1., 1., 1e-05, 1.
**
** BOUNDARY CONDITIONS
**
** Name: Disp-BC-1 Type: Displacement/Rotation
*Boundary
SET-102, 1, 1
** Name: Disp-BC-2 Type: Displacement/Rotation
*Boundary
SET-102, 2, 2
** Name: Disp-BC-3 Type: Displacement/Rotation
*Boundary
SET-102, 3, 3
**
** LOADS
**
** Name: GRAVITY-1   Type: Gravity
*Dload
, GRAV, 10., 0., 0., -1.
**
** OUTPUT REQUESTS
**
*Restart, write, frequency=0
**
** FIELD OUTPUT: F-Output-1
**
*Output, field, variable=PRESELECT
**
** HISTORY OUTPUT: H-Output-1
**
*Output, history, variable=PRESELECT
*End Step
